# Лабораторная работа №2  Выполнила Широкая Софья
# Вариант №70
№1
n := 0 .. 5
m := 0 .. 5
M[n, m] := n + m
M[n, n] := 2*n + 0.1
V[n] := n^2
M = [
    0.1, 1, 2, 3, 4, 5;
    1, 2.1, 3, 4, 5, 6;
    2, 3, 4.1, 5, 6, 7;
    3, 4, 5, 6.1, 7, 8;
    4, 5, 6, 7, 8.1, 9;
    5, 6, 7, 8, 9, 10.1
]
V = [0; 1; 4; 9; 16; 25]
№2
det(M) = -0.010199
det(M^2) = 0.00010402
M^-1 = [
    4.60731, -3.91215, -2.43161, -0.951074, 0.529464, 2.01;
    -3.91215, 6.9801, -2.12766, -1.23542, -0.343171, 0.549073;
    -2.43161, -2.12766, 8.17629, -1.51976, -1.21581, -0.911854;
    -0.951074, -1.23542, -1.51976, 8.1959, -2.08844, -2.37278;
    0.529464, -0.343171, -1.21581, -2.08844, 7.03893, -3.83371;
    2.01, 0.549073, -0.911854, -2.37278, -3.83371, 4.70536
]
condi(M) = 738.872
№3
x := M^-1*V
x = [36.5232; -4.41318; -25.3495; -26.2859; -7.22228; 31.8414]
lsolve(M, V) = [36.5232; -4.41318; -25.3495; -26.2859; -7.22228; 31.8414]
№4
(M*M^-1) - identity(6) = [
    5.32907e-15, 4.44089e-16, -2.66454e-15, 0, 7.10543e-15, -3.55271e-15;
    3.55271e-15, -1.77636e-15, -1.77636e-15, 7.10543e-15, 3.55271e-15, -3.55271e-15;
    3.55271e-15, -3.9968e-15, 2.66454e-15, 7.10543e-15, 3.55271e-15, -7.10543e-15;
    3.55271e-15, 8.88178e-16, -5.32907e-15, 7.10543e-15, -3.55271e-15, 0;
    7.10543e-15, -4.44089e-15, -1.77636e-15, 3.55271e-15, 0, 0;
    3.55271e-15, -7.10543e-15, 1.77636e-15, 1.06581e-14, 0, 0
]
№5
M*x - V = [-2.84217e-14; -2.84217e-14; -2.84217e-14; -5.68434e-14; 0; 5.68434e-14]
№6
t := 0 .. 7
p := 0 .. 7
w[t] := t^2
N[t, p] := 2*t + p/2
N[t, t] := 5*t + 1
N = [
    1, 0.5, 1, 1.5, 2, 2.5, 3, 3.5;
    2, 6, 3, 3.5, 4, 4.5, 5, 5.5;
    4, 4.5, 11, 5.5, 6, 6.5, 7, 7.5;
    6, 6.5, 7, 16, 8, 8.5, 9, 9.5;
    8, 8.5, 9, 9.5, 21, 10.5, 11, 11.5;
    10, 10.5, 11, 11.5, 12, 26, 13, 13.5;
    12, 12.5, 13, 13.5, 14, 14.5, 31, 15.5;
    14, 14.5, 15, 15.5, 16, 16.5, 17, 36
]
w = [0; 1; 4; 9; 16; 25; 36; 49]
det(N) = -44872888
-невырождена
lsolve(N, w) = [8.61319; 0.220596; -0.844836; -1.04825; -0.977384; -0.784617; -0.52709; -0.231056]
q := lsolve(N, w)
N*q - w = [-3.33067e-16; -2.22045e-16; -1.77636e-15; 7.10543e-15; 7.10543e-15; 2.13163e-14; 0; 2.13163e-14]
№7
B := lu(N)
B = [
    0, 0, 0, 0, 0, 0, 0, 1, 1, 0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;
    0, 1, 0, 0, 0, 0, 0, 0, 0.142857, 1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;
    0, 0, 1, 0, 0, 0, 0, 0, 0.285714, 0.0909091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;
    0, 0, 0, 1, 0, 0, 0, 0, 0.428571, 0.0727273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;
    0, 0, 0, 0, 1, 0, 0, 0, 0.571429, 0.0545455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;
    0, 0, 0, 0, 0, 1, 0, 0, 0.714286, 0.0363636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;
    1, 0, 0, 0, 0, 0, 0, 0, 0.0714286, -0.136364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;
    0, 0, 0, 0, 0, 0, 1, 0, 0.857143, 0.0181818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]
P := submatrix(B, 0, rows(B) - 1, 0, cols(B)/3 - 1)
P = [
    0, 0, 0, 0, 0, 0, 0, 1;
    0, 1, 0, 0, 0, 0, 0, 0;
    0, 0, 1, 0, 0, 0, 0, 0;
    0, 0, 0, 1, 0, 0, 0, 0;
    0, 0, 0, 0, 1, 0, 0, 0;
    0, 0, 0, 0, 0, 1, 0, 0;
    1, 0, 0, 0, 0, 0, 0, 0;
    0, 0, 0, 0, 0, 0, 1, 0
]
L := submatrix(B, 0, rows(B) - 1, cols(B)/4 + 2, (cols(B)/2) + 3)
L = [
    1, 0, 0, 0, 0, 0, 0, 0;
    0.142857, 1, 0, 0, 0, 0, 0, 0;
    0.285714, 0.0909091, 1, 0, 0, 0, 0, 0;
    0.428571, 0.0727273, 0.0767123, 1, 0, 0, 0, 0;
    0.571429, 0.0545455, 0.0575342, 0.0563422, 1, 0, 0, 0;
    0.714286, 0.0363636, 0.0383562, 0.0375615, 0.0365765, 1, 0, 0;
    0.0714286, -0.136364, 0.00684932, 0.0611119, 0.0881498, 0.104411, 1, 0;
    0.857143, 0.0181818, 0.0191781, 0.0187807, 0.0182882, 0.0179579, 8.61289, 1
]
U := submatrix(B, 0, rows(B) - 1, cols(B)/2 + 4, cols(B) - 1)
U = [
    14, 14.5, 15, 15.5, 16, 16.5, 17, 36;
    0, 3.92857, 0.857143, 1.28571, 1.71429, 2.14286, 2.57143, 0.357143;
    0, 0, 6.63636, 0.954545, 1.27273, 1.59091, 1.90909, -2.81818;
    0, 0, 0, 9.19041, 0.920548, 1.15068, 1.38082, -5.73836;
    0, 0, 0, 0, 11.6385, 0.798182, 0.957818, -8.60546;
    0, 0, 0, 0, 0, 14.0029, 0.603512, -11.5889;
    0, 0, 0, 0, 0, 0, 1.89146, 3.31583;
    0, 0, 0, 0, 0, 0, 0, -43.3952
]
№8
N^99 = [
    4.91932e190, 5.38659e190, 5.8824e190, 6.40945e190, 6.97078e190, 7.56986e190, 8.21061e190, 8.89755e190;
    9.33179e190, 1.02182e191, 1.11587e191, 1.21585e191, 1.32234e191, 1.43598e191, 1.55753e191, 1.68784e191;
    1.40138e191, 1.53449e191, 1.67573e191, 1.82587e191, 1.98578e191, 2.15644e191, 2.33897e191, 2.53466e191;
    1.89907e191, 2.07946e191, 2.27086e191, 2.47432e191, 2.69102e191, 2.92229e191, 3.16965e191, 3.43484e191;
    2.42914e191, 2.65987e191, 2.9047e191, 3.16496e191, 3.44214e191, 3.73796e191, 4.05436e191, 4.39357e191;
    2.99484e191, 3.27932e191, 3.58116e191, 3.90202e191, 4.24376e191, 4.60847e191, 4.99856e191, 5.41676e191;
    3.59991e191, 3.94185e191, 4.30469e191, 4.69037e191, 5.10115e191, 5.53955e191, 6.00845e191, 6.51114e191;
    4.24859e191, 4.65215e191, 5.08036e191, 5.53555e191, 6.02035e191, 6.53774e191, 7.09113e191, 7.68441e191
]
