# Лабораторная работа №4
# Вариант №70
# Выполнила Широкая Софья
№1
product(1 + 1/(2*k)^2, k = 1 .. ∞) → 1/(Γ((-1i + 2)/2)*Γ((1i + 2)/2)) = 1.46505
№2
sum(k^-2, k = 1 .. ∞) → π^2/6 = 1.64493
№3
limit((tan(x) - sin(x))/x^3, x → 0) → 1/2
limit((sqrt(x + 4) - 2)/x, x → 0) → 1/4
№4
limit(x*ln(sin(x)), x → 0+) → 0
limit(x^x, x → 0+) → 1
№5
y(x) := sin(x^3)^2
d^1/dx^1(y(x)) → 6*x^2*cos(x^3)*sin(x^3)
y(x) := cot(sin(ln(x)))
d^1/dx^1(y(x)) → (-(cos(ln(x))*cot(sin(ln(x)))^2) - cos(ln(x)))/x
y(x) := x*sqrt(1 - x^2) + asin(x)
d^1/dx^1(y(x)) → (-(2*x^2) + 2)/sqrt(-x^2 + 1)
№6
f(x) := ln(1 + x)/(2*x - 1)
x := 0
d^1/dx^1(f(x)) → -1
x := 1
d^2/dx^2(f(x)) → 8*ln(2) - 9/4
x := 2
d^3/dx^3(f(x)) → (-(48*ln(3)) + 32)/81
clear(x)
№7
integral(sin(x)^3, x) → (cos(3*x) - 9*cos(x))/12
integral(sqrt(x^2 + 1), x) → -(2*ln(sqrt(x^2 + 1) - x) + 2*x^2 + 1)/4 - 1/(8*x*sqrt(x^2 + 1) - (8*x^2 + 4))
№8
integral(cos(x), x = 0 .. 2*π) → 0
integral(1/(x*ln(x)^3), x = 2 .. ∞) → 1/(2*ln(2)^2)
integral(ln(x), x = 0 .. 1) → -1
№9
cos(x) series, 10 → 1 - 1/2*x^2 + 1/24*x^4 - 1/720*x^6 + 1/40320*x^8
atan(x) series, 10 → x - 1/3*x^3 + 1/5*x^5 - 1/7*x^7 + 1/9*x^9
№10
g(x) := (sqrt(1 + x) + sqrt(1 - x))/(sqrt(1 + x) - sqrt(1 - x))
x(a) := 2*a/(a^2 + 1)
g(a) simplify → 2*sqrt(-a + 1)/(sqrt(a + 1) - sqrt(-a + 1)) + 1
№11
clear(x)
x^5 + b*x^4 - a^4*x - a^4*b solve, x → [a; -a; -b; sqrt(-a^2); -sqrt(-a^2)]
clear(x)
8*x^7 - 7*x^6 + 6*x^5 - 5*x^4 + 4*x^3 - 3*x^2 + 2*x - 1 solve → [
    -0.498978114893 + 0.605420720541i;
    -0.498978114893 - 0.605420720541i;
    0.0517881070338 - 0.738248692593i;
    0.0517881070338 + 0.738248692593i;
    0.527421144275 + 0.490671408784i;
    0.527421144275 - 0.490671408784i;
    0.714537727167
]
№12
A(a, b, n) :=
    for i ∈ 0 .. (n - 1)
        A[i, i] ← a
        for j ∈ 0 .. (n - 1)
            if i < j
                A[i, j] ← 1
            if i > j
                A[i, j] ← b
    A
C(n) :=
    for i ∈ 0 .. n - 1
        if (mod(i, 4) == 0)
            C[i] ← 1
        else if (mod(i - 1, 4) == 0)
            C[i] ← 1
        else
            C[i] ← 2
    C
A(a, b, 2) → [a, 1; b, a]
C(2) → [1; 1]
det(A(a, b, 2)) → -b + a^2
A(a, b, 2)^-1*C(2) → [-a/(b - a^2) + 1/(b - a^2); b/(b - a^2) - a/(b - a^2)]
A(a, b, 4) → [a, 1, 1, 1; b, a, 1, 1; b, b, a, 1; b, b, b, a]
C(4) → [1; 1; 2; 2]
det(A(a, b, 4)) → -b^3 + (4*a - 1)*b^2 + (4*a - 6*a^2 - 1)*b + a^4
A(a, b, 4)^-1*C(4) → [
    ((-a + 1)*b + 5*a^2 - a^3 - 6*a + 2)/(b^3 + (1 - 4*a)*b^2 + (6*a^2 - 4*a + 1)*b - a^4);
    (b^2 + (a^2 - 5*a + 2)*b + (4*a^2 - a^3 - 2*a))/(b^3 + (1 - 4*a)*b^2 + (6*a^2 - 4*a + 1)*b - a^4);
    ((-a + 1)*b^2 + (2*a^2 - a - 1)*b + (2*a^2 - 2*a^3))/(b^3 + (1 - 4*a)*b^2 + (6*a^2 - 4*a + 1)*b - a^4);
    (b^3 - (3*a + 1)*b^2 + (4*a^2 + a)*b - 2*a^3)/(b^3 + (1 - 4*a)*b^2 + (6*a^2 - 4*a + 1)*b - a^4)
]
A(a, b, 8) → [
    a, 1, 1, 1, 1, 1, 1, 1;
    b, a, 1, 1, 1, 1, 1, 1;
    b, b, a, 1, 1, 1, 1, 1;
    b, b, b, a, 1, 1, 1, 1;
    b, b, b, b, a, 1, 1, 1;
    b, b, b, b, b, a, 1, 1;
    b, b, b, b, b, b, a, 1;
    b, b, b, b, b, b, b, a
]
C(8) → [1; 1; 2; 2; 1; 1; 2; 2]
A(a, b, 8)^-1*C(8)  # error: Полученный результат этой символьной операции слишком длинный для отображения, но он может использоваться в последующих расчетах, если будет присвоен функции или переменной.
det(A(a, b, 8)) → -b^7 + (8*a - 1)*b^6 + (8*a - 28*a^2 - 1)*b^5 + (56*a^3 - 28*a^2 + 8*a - 1)*b^4 + (56*a^3 - 70*a^4 - 28*a^2 + 8*a - 1)*b^3 + (56*a^5 - 70*a^4 + 56*a^3 - 28*a^2 + 8*a - 1)*b^2 + (56*a^5 - 28*a^6 - 70*a^4 + 56*a^3 - 28*a^2 + 8*a - 1)*b + a^8
