# Лабораторная работа №5 | Выполнила Широкая Софья
№1
v[0] := 1
v[1] := 2
v[2] := 3
a := WRITETEXT("output1.txt", v)
№2
M := [1, 3, 45; -3, 4, 11; -3, -98, 0]
b := WRITETEXT("output2.txt", M)
№3
READTEXT("input.txt") = [1, 3, 4, 5, 6; 2, 3, 4, 11, 8]
№4
c := READEXCEL("excelinput.xlsx", "Лист1!A1:G10")
c = [
    0.450609, 0.387473, 0.785281, 0.929278, 0.137191, 0.668635, 0.590046;
    0.76321, 0.592551, 0.446409, 0.0528969, 0.532888, 0.455301, 0.0474838;
    0.417733, 0.106345, 0.311525, 0.686135, 0.598675, 0.96758, 0.639489;
    0.12689, 0.159137, 0.281563, 0.195993, 0.623917, 0.639725, 0.0715298;
    0.706222, 0.143735, 0.09624, 0.374648, 0.326023, 0.191861, 0.218742;
    0.173349, 0.319304, 0.244929, 0.574951, 0.19423, 0.39021, 0.884623;
    0.122253, 0.126523, 0.162208, 0.710829, 0.440884, 0.55588, 0.0524351;
    0.52219, 0.435422, 0.440723, 0.836424, 0.554974, 0.614228, 0.793788;
    0.42795, 0.89175, 0.31014, 0.531647, 0.509887, 0.997763, 0.724002;
    0.585857, 0.382092, 0.467929, 0.486806, 0.543932, 0.284017, 0.686976
]
# [3D plot: c]
# прим.: график выглядит так хаотично, потому что я заполнила таблицу случайными числами. но он есть
№5
P := [1, 2, 4, -7; 0, 87, 3, 12; 3, 4, -1, 3; 9, 34, 2, 0]
d := WRITEEXCEL(P, "exceloutput.xlsx", "A1")
